include src/common.ini

# getting datetime data for naming files
if "$(is_defined(variable, file_name) == 0)" then &
  "shell date +%Y-%m-%d_%H-%M > timestamp.tmp"    &
  "variable timestamp file timestamp.tmp"         &
  "shell rm timestamp.tmp"                        &
  "variable file_name string equilibration.${timestamp}"

# if atom file name is not given, get the last modified one
if "$(is_defined(variable, atom_file) == 0)" then &
  "shell ls -t atoms.* | head -1 > atom_file.tmp" &
  "variable atom_file file atom_file.tmp"         &
  "shell rm atom_file.tmp"

read_data ${atom_file}

# ---                      --- #
# --- system configuration --- #
# ---                      --- #

# logging results
log logs/equilibrations/${file_name}.log
shell rm log.lammps

# --- replacing exactly 5at% of Al with Mg --- #

set type 1 type/fraction 2 0.05 12345

mass 1 ${al_mass}
mass 2 ${mg_mass}

# --- dividing into regions --- #

region top_region block INF                  INF &
                        $(ly-v_layer_thresh) INF &
                        INF                  INF units box

region bot_region block INF INF            &
                        INF v_layer_thresh &
                        INF INF            units box

group top_layer region top_region                # mobile rigid top layer
group bot_layer region bot_region                # static rigid bottom layer
group mobile    subtract all top_layer bot_layer # mobile middle layer (just atoms)

# --- potential config --- #

pair_style eam/fs                      # Finnis-Sinclair format Embedded Atom Method
pair_coeff * * ${potential_almg} Al Mg # 1-1, 1-2, 2-2, where 1=Al, 2=Mg (because the potential file is made this way)

# default values (used if values below are not uncommented)
#neighbor 2.0 bin
#neigh_modify delay 0 every 1 check yes

# performance tuned
#neighbor 2.0 bin
#neigh_modify delay 10 every 2 check yes

# stability tuned (set if "Dangerous builds" != 0)
#neighbor 3.0 bin
#neigh_modify delay 0 every 1 check yes

# ---                                --- #
# --- STEP 1: minimize system energy --- #
# ---                                --- #

# 1e-12 * 1e-2 = 1e-14 sec = 10 fs
timestep 0.01 # [ps]

compute pot_energy all pe/atom
compute stress     all stress/atom NULL

fix 1 top_layer setforce 0.0 0.0 NULL
fix 2 bot_layer setforce 0.0 0.0 NULL

print "###                   ###"
print "## energy minimization ##"
print "###                   ###"

minimize 0.0 1.0e-8 10000 100000

# ---                                   --- #
# --- STEP 2: temperature equilibration --- #
# ---                                   --- #

timestep ${equilibration_run_timestep}

unfix 1
unfix 2
reset_timestep 0

# define temperature (only of the moving atoms)
compute mobile_temp mobile temp

# initialize atom velocities
velocity mobile create ${desired_temp} 12345 units box
velocity mobile zero   linear
velocity mobile zero   angular

# equilibrate the temperature
fix 1 mobile npt temp ${desired_temp} ${desired_temp} 0.1 x 0.0 0.0 1.0 z 0.0 0.0 1.0
fix_modify 1 temp mobile_temp

# boundary conditions
fix 2 top_layer setforce 0.0 0.0 NULL
fix 3 bot_layer setforce 0.0 0.0 NULL

thermo        100
thermo_modify temp mobile_temp
thermo_style  custom step pe ke temp pxx pyy pzz pxy pyz pxz

dump 1 all custom ${equilibration_dump_freq} &
     dumps/equilibrations/${file_name}.atom  &
     id type x y z c_pot_energy c_stress[1] c_stress[2] c_stress[3] c_stress[4] c_stress[5] c_stress[6]

print "###                         ###"
print "## temperature equilibration ##"
print "###                         ###"

run ${equilibration_run_steps}

unfix 1
unfix 2
unfix 3

write_restart restarts/equilibrations/${file_name}.restart
